*Parameter
 alpha = 0
 beta = 0
 length = 0.1
 displacement = 0.04
 beta_r = beta/180.*acos(-1.)
 cosbeta = displacement*cos(beta_r)
 sinbeta = displacement*sin(beta_r)
** Material definition
 feature_flags = 100001
 mu = 0.3
 density = 1.57e-09
 thickness = 0
**
** CompDam parameters
**
*PARAMETER TABLE TYPE, NAME=KEY_INT, parameters=2
STRING
INTEGER
*TABLE COLLECTION, NAME=COMPDAM_PARAM
** CompDam parameters with integer values
** 0 = False, 1 = True
*PARAMETER TABLE, type=KEY_INT, label=CDP_INT
alpha_search, 0
**
*NODE, NSET=GLOBAL
      1,            0.,            0.,            0.
      2,      <length>,            0.,            0.
      3,      <length>,      <length>,            0.
      4,            0.,      <length>,            0.
      5,            0.,            0.,      <length>
      6,      <length>,            0.,      <length>
      7,      <length>,      <length>,      <length>
      8,            0.,      <length>,      <length>
*NSET, NSET=X+
  2, 3, 6, 7
*NSET, NSET=X-
  1, 4, 5, 8
*NSET, NSET=Y+
  3, 4, 7, 8
*NSET, NSET=Y-
  1, 2, 5, 6
*NSET, NSET=Z+
  5, 6, 7, 8
*NSET, NSET=Z-
  1, 2, 3, 4
**
*ELEMENT, TYPE=C3D8R, ELSET=ALL_ELEMS
  1, 1, 2, 3, 4, 5, 6, 7, 8
**
** PROPERTIES
**
*SOLID SECTION, ELSET=ALL_ELEMS, MATERIAL=IM7-8552
**
** MATERIALS
**
*Include, input=IM7-8552-C3D.inp
**
** INITIAL CONDITIONS
**
*Initial Conditions, Type=Solution
ALL_ELEMS,  0.d0,   0.d0,  0.d0,  0.d0,  0.d0,  0.d0,  0.d0,
0.d0,       0.d0,<alpha>,     1,  0.d0,  0.d0,  0.d0,  0.d0,
0.d0,       0.d0,   0.d0,  0.d0
*BOUNDARY
  Y-, 1, 3, 0
  Y+, 1, 1, 0
*Amplitude, name=LoadUp, definition=SMOOTH STEP
0., 0., 0.1, 1.
*Amplitude, name=LoadDown, definition=SMOOTH STEP
0., 1., 0.2, -1.
**
*STEP, NLGEOM=YES
*Dynamic, Explicit
 , 0.1, ,
*Fixed Mass Scaling, factor=5000.
*Variable Mass Scaling, dt=5.0d-7, type=BELOW MIN, frequency=100
**
** OUTPUT
**
*OUTPUT, FIELD, VARIABLE=PRESELECT
*ELEMENT OUTPUT, VARIABLE=PRESELECT
 SDV, S, LE
*Node Output, variable=preselect
 U, RF
*OUTPUT, HISTORY, VARIABLE=PRESELECT, frequency=1
*NODE OUTPUT, NSET=Y+
 U, RF
*ELEMENT OUTPUT, VARIABLE=PRESELECT, ELSET=ALL_ELEMS
 SDV, S, LE
**
** LOADING
**
*Boundary, AMPLITUDE=LoadUp
 Y+, 2, 2, <cosbeta>
 Y+, 3, 3, <sinbeta>
*END STEP
*STEP, NLGEOM=YES
*Dynamic, Explicit
 , 0.2, ,
*Fixed Mass Scaling, factor=5000.
*Variable Mass Scaling, dt=5.0d-7, type=BELOW MIN, frequency=100
**
** OUTPUT
**
*OUTPUT, FIELD, VARIABLE=PRESELECT
*ELEMENT OUTPUT, VARIABLE=PRESELECT
 SDV, S, LE
*Node Output, variable=preselect
 U, RF
*OUTPUT, HISTORY, VARIABLE=PRESELECT, frequency=1
*NODE OUTPUT, NSET=Y+
 U, RF
*ELEMENT OUTPUT, VARIABLE=PRESELECT, ELSET=ALL_ELEMS
 SDV, S, LE
**
** LOADING
**
*Boundary, AMPLITUDE=LoadDown
 Y+, 2, 2, <cosbeta>
 Y+, 3, 3, <sinbeta>
*END STEP
