*Heading
 Single element test for simple shear loading with friction and compression
**
*Parameter
 length = 0.1
 shear_displacement = 0.05*2.0
 compression_1 = -40.0
** Material definition
 feature_flags = 100001
 mu = 0.3
 density = 1.57e-05
 thickness = 0
**
** CompDam parameters
**
*PARAMETER TABLE TYPE, NAME=KEY_INT, parameters=2
STRING
INTEGER
*TABLE COLLECTION, NAME=COMPDAM_PARAM
** CompDam parameters with integer values
** 0 = False, 1 = True
*PARAMETER TABLE, type=KEY_INT, label=CDP_INT
alpha_search, 0
**
** NODES
**
*NODE, NSET=GLOBAL
      1,            0.,            0.,            0.
      2,      <length>,            0.,            0.
      3,      <length>,      <length>,            0.
      4,            0.,      <length>,            0.
      5,            0.,            0.,      <length>
      6,      <length>,            0.,      <length>
      7,      <length>,      <length>,      <length>
      8,            0.,      <length>,      <length>
*NSET, NSET=X+
  2, 3, 6, 7
*NSET, NSET=X-
  1, 4, 5, 8
*NSET, NSET=Y+
  3, 4, 7, 8
*NSET, NSET=Y-
  1, 2, 5, 6
*NSET, NSET=Z+
  5, 6, 7, 8
*NSET, NSET=Z-
  1, 2, 3, 4
*NSET, NSET=X_load
  3
**
** ELEMENTS
**
*ELEMENT, TYPE=C3D8R, ELSET=ALL_ELEMS
  1, 1, 2, 3, 4, 5, 6, 7, 8
**
** PROPERTIES
**
*SOLID SECTION, ELSET=ALL_ELEMS, MATERIAL=IM7-8552
**
** MATERIALS
**
*Include, input=IM7-8552-C3D.inp
**
** INITIAL CONDITIONS
**
*Initial Conditions, Type=Solution
ALL_ELEMS,  0.d0,  0.d0,  0.d0,  0.d0,  0.d0,  0.d0,  0.d0,
 0.d0,      0.d0,  0.d0,     1,  0.d0,  0.d0,  0.d0,  0.d0,
 0.d0,      0.d0,  0.d0,  0.d0
*Boundary
  Y-, 2, 2
  Z-, 3, 3
**
*Amplitude, name=Compression, definition=SMOOTH STEP
0., 0., 0.1, 1.
*Amplitude, name=LoadUp, definition=SMOOTH STEP
0., 0., 0.1, 1.
*Amplitude, name=LoadDown, definition=SMOOTH STEP
0., 1., 0.2, -1.
**
*Equation
** Parallel edges due to 1-direction loading
2
1, 1, 1., 3, 1, 1.
2
4, 1, 1., 2, 1, 1.
** Same 1-direction displacements on negative and positive z faces
2
5, 1, 1., 1, 1, -1.
2
6, 1, 1., 2, 1, -1.
2
7, 1, 1., 3, 1, -1.
2
8, 1, 1., 4, 1, -1.
** Y+ surface remains parallel to Y- surface
2
8, 2, 1., 7, 2, -1.
2
7, 2, 1., 4, 2, -1.
2
4, 2, 1., 3, 2, -1.
** Z+ surface remains parallel to Z- surface
2
8, 3, 1., 7, 3, -1.
2
7, 3, 1., 6, 3, -1.
2
6, 3, 1., 5, 3, -1.
** Y+ surface follower nodes for 1-direction loading
2
8, 1, 1., 3, 1, -1.
2
7, 1, 1., 3, 1, -1.
2
4, 1, 1., 3, 1, -1.
** ----------------------------------------------------------------
*Step, nlgeom=YES
*Dynamic, Explicit
 , 0.1, ,
**
*Variable mass scaling, type=BELOW MIN, dt=1.d-6, frequency=1
**
*OUTPUT, FIELD
*ELEMENT OUTPUT
 SDV, S, LE
*Node Output
 U, RF, CF
*OUTPUT, HISTORY, frequency=1
*Energy Output
 ALLIE, ALLKE, ALLPD
*NODE OUTPUT, NSET=X_load
 U, RF
*ELEMENT OUTPUT, ELSET=ALL_ELEMS
 SDV, S, LE
**
*Dload, amplitude=Compression, Constant resultant=No, follower=No
1, TRVEC5, <compression_1>, 0.0, 1.0, 0.0
**
*End Step
** ----------------------------------------------------------------
*Step
*Dynamic, Explicit
 , 0.1, ,
**
*OUTPUT, FIELD
*ELEMENT OUTPUT
 SDV, S, LE
*Node Output
 U, RF
*OUTPUT, HISTORY, frequency=1
*Energy Output
 ALLIE, ALLKE, ALLPD
*NODE OUTPUT, NSET=X_load
 U, RF
*ELEMENT OUTPUT, ELSET=ALL_ELEMS
 SDV, S, LE
**
*Boundary, AMPLITUDE=LoadUp
 X_load, 1, 1, <shear_displacement>
**
*End Step
** ----------------------------------------------------------------
*Step
*Dynamic, Explicit
 , 0.2, ,
**
*OUTPUT, FIELD
*ELEMENT OUTPUT
 SDV, S, LE
*Node Output
 U, RF
*OUTPUT, HISTORY, frequency=1
*Energy Output
 ALLIE, ALLKE, ALLPD
*NODE OUTPUT, NSET=X_load
 U, RF
*ELEMENT OUTPUT, ELSET=ALL_ELEMS
 SDV, S, LE
**
*Boundary, AMPLITUDE=LoadDown
 X_load, 1, 1, <shear_displacement>
**
*End Step
